*HEADING
ABAQUS-style file created by OOF3D on 2018-05-31 15:24:10.760990 from a mesh of the microstructure skeltest.
** Materials defined by OOF3D:
**   bricks:
**     name: Color:wred
**     color: RGBColor(red=1.00000,green=0.00000,blue=0.00000)
**     name: Mechanical:Elasticity:Isotropic:soft
**     cijkl: IsotropicRank4TensorEnu(young=0.6666666666666666,poisson=0.3333333333333333)
**   mortar:
**     name: Color:bloo
**     color: RGBColor(red=0.00000,green=0.00000,blue=1.00000)
**     name: Mechanical:Elasticity:Isotropic:stiff
**     cijkl: IsotropicRank4TensorEnu(young=100.0,poisson=0.3333333333333333)
** Master elements used in OOF3D:
**   Line: D2_3, Subparametric 3-noded edge element
**   Tetrahedron: TET4_10, Subparametric 10 noded tetrahedron with linear interpolation for positions and quadratic interpolation for fields.
**   Triangle: T3_6, Subparametric 6 noded triangle with linear interpolation for positions and quadratic interpolation for fields
**   Quadrilateral: Q4_8, Subparametric 8 noded quadrilateral with bilinear interpolation for positions and quadratic interpolation for fields
** Boundary Conditions:
** Notes:
**   The set of nodes and elements may be different from the set
**    created from a skeleton depending on the element type and if the
**    mesh was refined.
** The materials and boundary conditions provided by OOF3D should be
**   translated into ABAQUS by the user.
** The element type(s) *will* have to be modified by the user. Search for
**   ABAQUSELEMENTTYPE in this file.
** Only elements (and nodes of such elements) that have an associated
**   material are included in this file.
*NODE
1, 17.5, 2.5, 5.0
2, 15.0, 2.5, 7.5
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** The OOF3D element type is TET4_10. The ABAQUS element type will
** have to be modified by the user to be meaningful.
*ELEMENT, TYPE=ABAQUSELEMENTTYPE
1, 1, 2, 3, 4, 5, 6, 7, 8, 9, 10
2, 11, 12, 13, 1, 14, 15, 16, 17, 18, 19
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** Point boundaries in OOF3D
*NSET, NSET=XmaxYminZmax
2831
*NSET, NSET=XmaxYmaxZmin
2635
*NSET, NSET=XminYminZmax
1948
*NSET, NSET=XmaxYminZmin
2460
*NSET, NSET=XminYmaxZmax
3027
*NSET, NSET=XminYminZmin
1446
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*ELSET, ELSET=bricks
1, 2, 3, 4, 5, 6
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*SOLID SECTION, ELSET=bricks, MATERIAL=bricks
*ELSET, ELSET=mortar
14, 15, 17, 18, 19, 20
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*SOLID SECTION, ELSET=mortar, MATERIAL=mortar
*MATERIAL, NAME=bricks** Use the information in the header to complete these fields under MATERIAL
*MATERIAL, NAME=mortar** Use the information in the header to complete these fields under MATERIAL
