*HEADING
ABAQUS-style file created by OOF3D on 2018-05-29 17:22:21.931878 from a skeleton of the microstructure skeltest.
** NOTE: Search for ABAQUSELEMENTTYPE in this file and replace it with an
** appropriate abaqus element type.  This file was created from an OOF3D
** Skeleton, and therefore all nodes are at the corners of elements.
** To create an abaqus mesh with higher order elements create an OOF3D Mesh
** with higher order elements and save it in abaqus format.
**
** Materials defined by OOF2:
**   bricks:
**     name: Color:wred
**     color: RGBColor(red=1.00000,green=0.00000,blue=0.00000)
**     name: Mechanical:Elasticity:Isotropic:soft
**     cijkl: IsotropicRank4TensorEnu(young=0.6666666666666666,poisson=0.3333333333333333)
**   mortar:
**     name: Color:bloo
**     color: RGBColor(red=0.00000,green=0.00000,blue=1.00000)
**     name: Mechanical:Elasticity:Isotropic:stiff
**     cijkl: IsotropicRank4TensorEnu(young=100.0,poisson=0.3333333333333333)
*NODE
1, 0.0, 0.0, 0.0
2, 0.0, 0.0, 5.0
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**  OOF3D elements with 4 nodes. Change ABAQUSELEMENTTYPE to an appropriate abaqus element.
*ELEMENT, TYPE=ABAQUSELEMENTTYPE
1, 128, 126, 127, 42
2, 22, 18, 48, 128
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**/n** Point, edge, and face boundaries from OOF3D.
**
*NSET, NSET=XmaxYminZmax
25
*NSET, NSET=XmaxYmaxZmin
121
*NSET, NSET=XminYminZmax
5
*NSET, NSET=XmaxYminZmin
21
*NSET, NSET=XminYmaxZmax
105
*NSET, NSET=XminYminZmin
1
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**/n** Element groups for OOF3D materials.
**
*ELSET, ELSET=bricks
1, 2, 3, 4, 5, 6
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*SOLID SECTION, ELSET=bricks, MATERIAL=bricks
*ELSET, ELSET=mortar
14, 15, 17, 18, 19, 20
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*SOLID SECTION, ELSET=mortar, MATERIAL=mortar
*MATERIAL, NAME=bricks
** Use the information in the header to complete these fields under MATERIAL
*MATERIAL, NAME=mortar
** Use the information in the header to complete these fields under MATERIAL
